*Heading
** Job name: FEM_Matlab_25 Model name: FEM_Matlab
** Generated by: Abaqus/CAE 2021
*Preprint, echo=NO, model=NO, history=NO, contact=NO
**
** PARTS
**
*Part, name=Part-1
*Node
      1, -0.300000012,  0.300000012,           0.
      2, -0.180000007,  0.300000012,           0.
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*Element, type=C3D20R
 1,   7,   8,   2,   1,  43,  44,  38,  37,  76,  75,  74,  73,  77,  78,  79,
     80,  82,  81,  83,  84
 2,   8,   9,   3,   2,  44,  45,  39,  38,  87,  86,  85,  75,  88,  89,  90,
     78,  81,  91,  92,  83
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*Nset, nset=Set-1, generate
   1,  228,    1
*Elset, elset=Set-1, generate
  1,  25,   1
** Section: Section-1
*Solid Section, elset=Set-1, material=Material-1
,
*End Part
**
**
** ASSEMBLY
**
*Assembly, name=Assembly
**
*Instance, name=Part-1-1, part=Part-1
*End Instance
**
*Nset, nset=BC, instance=Part-1-1
   1,   7,  13,  19,  25,  31
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*Elset, elset=BC, instance=Part-1-1, generate
  1,  21,   5
*Nset, nset=BCx, instance=Part-1-1
  93,  95,  96,  98, 131, 132, 159, 160, 187, 188, 215, 216
*Nset, nset=BCxG, instance=Part-1-1
   1,   7,  13,  19,  25,  31
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*Elset, elset=BCxG, instance=Part-1-1, generate
  1,  21,   5
*Nset, nset=BCy, instance=Part-1-1
 145, 146, 149, 150, 153, 156, 158, 161, 163, 166, 168, 171
*Nset, nset=BCyG, instance=Part-1-1
  31,  32,  33,  34,  35,  36
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*Elset, elset=BCyG, instance=Part-1-1, generate
 21,  25,   1
*Nset, nset=BCz, instance=Part-1-1
  82,  83,  84,  92, 100, 108
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*Nset, nset=BCzG, instance=Part-1-1
   1,   2,   3,   4,   5,   6
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*Elset, elset=BCzG, instance=Part-1-1
  1,  2,  3,  4,  5,  6, 10, 11, 15, 16, 20, 21, 22, 23, 24, 25
*Nset, nset=S1, instance=Part-1-1
  37,  38,  39,  40,  41,  42
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*Elset, elset=S1, instance=Part-1-1, generate
  1,  25,   1
*Nset, nset=Sa, instance=Part-1-1
   1,   2,   3,   4,   5,   6
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*Elset, elset=Sa, instance=Part-1-1
  1,  2,  3,  4,  5, 10, 15, 20, 25
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*Elset, elset=_Surf-1_S5, internal, instance=Part-1-1, generate
 1,  5,  1
*Surface, type=ELEMENT, name=Surf-1
_Surf-1_S5, S5
*Elset, elset=_Surf-3_S4, internal, instance=Part-1-1, generate
  5,  25,   5
*Elset, elset=_Surf-3_S6, internal, instance=Part-1-1, generate
  1,  21,   5
*Surface, type=ELEMENT, name=Surf-3
_Surf-3_S4, S4
_Surf-3_S6, S6
*Elset, elset=_Surf-4_S4, internal, instance=Part-1-1, generate
  5,  25,   5
*Elset, elset=_Surf-4_S3, internal, instance=Part-1-1, generate
 21,  25,   1
*Elset, elset=_Surf-4_S6, internal, instance=Part-1-1, generate
  1,  21,   5
*Elset, elset=_Surf-4_S5, internal, instance=Part-1-1, generate
 1,  5,  1
*Surface, type=ELEMENT, name=Surf-4
_Surf-4_S4, S4
_Surf-4_S3, S3
_Surf-4_S6, S6
_Surf-4_S5, S5
*End Assembly
**
** MATERIALS
**
*Material, name=Material-1
*Density
2700.,
*Elastic
 1e+11, 0.3
** ----------------------------------------------------------------
**
** STEP: Step-2
**
*Step, name=Step-2, nlgeom=NO
*Static
1., 1., 1e-05, 1.
**
** BOUNDARY CONDITIONS
**
** Name: BC-4 Type: Displacement/Rotation
*Boundary
BCx, 1, 1
** Name: BC-5 Type: Displacement/Rotation
*Boundary
BCy, 2, 2
** Name: BC-6 Type: Displacement/Rotation
*Boundary
BCz, 3, 3
**
** LOADS
**
** Name: Load-4   Type: Pressure
*Dsload
Surf-4, P, -1e+11
**
** OUTPUT REQUESTS
**
*Restart, write, frequency=0
**
** FIELD OUTPUT: F-Output-2
**
*Output, field, variable=PRESELECT
**
** HISTORY OUTPUT: H-Output-1
**
*Output, history, variable=PRESELECT
*End Step
