*Heading
** Job name: IE_Section Model name: IE_Section
** Generated by: Abaqus/CAE 2021
*Preprint, echo=NO, model=NO, history=NO, contact=NO
**
** PARTS
**
*Part, name=All
*Node
      1,           0.,   1.76776695,   1.76776695
      2,           0.,           0.,           0.
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*Element, type=C3D10
 1,  85,  26,   4,  23,  99,  98,  97, 101, 100, 102
 2,  85,  26,  24,   4,  99, 104, 103,  97,  98, 105
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*End Part
**
**
** ASSEMBLY
**
*Assembly, name=Assembly
**
*Instance, name=All-3, part=All
*End Instance
**
*Nset, nset=S1, instance=All-3
   1,   2,   3,   4,   5,   6
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*Elset, elset=S1, instance=All-3
   2,   3,   6,   7,   9,  14
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*End Assembly
*Amplitude, name=Amp-1
             0.,              1.,           1000.,              3.
**
** MATERIALS
**
*Material, name=Material-1
*Conductivity
 2.25,
*Density
3000.,
*Elastic
 1e+11, 0.3
*Expansion
 7.5e-06,
*Specific Heat
1000.,
**
** PREDEFINED FIELDS
**
** Name: Predefined Field-1   Type: Temperature
*Initial Conditions, type=TEMPERATURE
Set-7, 100.
** ----------------------------------------------------------------
**
** STEP: Step-5
**
*Step, name=Step-5, nlgeom=NO, perturbation
*Frequency, eigensolver=Lanczos, sim, acoustic coupling=on, normalization=mass
, , 10000., , ,
**
** BOUNDARY CONDITIONS
**
** Name: BC-2 Type: Displacement/Rotation
*Boundary
BC_Node_sets, 1, 1
BC_Node_sets, 2, 2
BC_Node_sets, 3, 3
**
** OUTPUT REQUESTS
**
*Restart, write, frequency=0
*Output, field
*Node Output
*End Step
